# OpenSim document version 40600
Model Pose2Sim_scaled:
  gravity: 0 -9.80665 0
  length_units: meters
  force_units: N
  credits:
    Full-body model adapted from Rajagopal et al. No muscles included. Removed patella. Added contact spheres. Free pelvis translation, added ball joint between head and torso, locked arm pronation/supination, clamped hip flexion to 150° instead of 120°, hip adduction -60° instead of -50°, hip rotation -70° instead of -40°, knee 155° instead of 120°.
  publications:
    Pagnon, D., Domalain, M., Reveret, L. (2021). Pose2Sim: An End-to-End Workflow for 3D Markerless Sports Kinematics—Part 1: Robustness. Sensors, 21(19), 6530.
  Ground
  BodySet:
    Body pelvis: mass=10.96781 mass_center=(-0.07119275 0 0) inertia=(0.09707583 0.08225004 0.05467598 0 0 0)
        meshes=(r_pelvis.vtp l_pelvis.vtp)
    Body sacrum: mass=0 mass_center=(0 0 0) inertia=(0 0 0 0 0 0) meshes=sacrum.vtp
    Body femur_r: mass=8.662307 mass_center=(0 -0.2409217 0) inertia=(0.2504493 0.06565175 0.2641033 0 0 0)
        meshes=femur_r.vtp
    Body tibia_r: mass=3.45276 mass_center=(0 -0.256986 0) inertia=(0.08892956 0.008998825 0.0901647 0 0 0)
        meshes=(tibia_r.vtp fibula_r.vtp)
    Body talus_r: mass=0.09312907 mass_center=(0 0 0) inertia=(0.0009312907 0.0009312907 0.0009312907 0 0 0)
        meshes=talus_rv.vtp
    Body calcn_r: mass=1.164113 mass_center=(0.1 0.03 0) inertia=(0.001303807 0.003632034 0.003818292 0 0 0)
        meshes=foot.vtp
    Body toes_r: mass=0.2017176 mass_center=(0.0346 0.006 -0.0175)
        inertia=(9.312907e-5 0.0001862581 0.0009312907 0 0 0) meshes=bofoot.vtp
    Body femur_l: mass=8.662307 mass_center=(0 -0.2409217 0) inertia=(0.2504493 0.06565175 0.2641033 0 0 0)
        meshes=femur_l.vtp
    Body tibia_l: mass=3.45276 mass_center=(0 -0.256986 0) inertia=(0.08892956 0.008998825 0.0901647 0 0 0)
        meshes=(tibia_l.vtp fibula_l.vtp)
    Body talus_l: mass=0.09312907 mass_center=(0 0 0) inertia=(0.0009312907 0.0009312907 0.0009312907 0 0 0)
        meshes=talus_lv.vtp
    Body calcn_l: mass=1.164113 mass_center=(0.1 0.03 0) inertia=(0.001303807 0.003632034 0.003818292 0 0 0)
        meshes=l_foot.vtp
    Body toes_l: mass=0.2017176 mass_center=(0.0346 0.006 0.0175) inertia=(9.312907e-5 0.0001862581 0.0009312907 0 0 0)
        meshes=l_bofoot.vtp
    Body torso: mass=20.99939 mass_center=(-0.04374753 0.4666404 0) inertia=(2.920079 1.496182 2.834725 0 0 0)
        meshes=(hat_spine.vtp hat_ribs_scap.vtp)
    Body head: mass=3.983875 mass_center=(0.01606673 0.05850891 0) inertia=(0.01070139 0.007743405 0.01166931 0 0 0)
        meshes=(jaw.vtp skull.vtp)
    Body humerus_r: mass=1.892848 mass_center=(0 -0.2748594 0) inertia=(0.03105894 0.01071437 0.03486266 0 0 0)
        meshes=humerus_rv.vtp
    Body ulna_r: mass=0.5657591 mass_center=(0 -0.1751445 0) inertia=(0.005825175 0.001215381 0.006318801 0 0 0)
        meshes=ulna_rv.vtp
    Body radius_r: mass=0.5657591 mass_center=(0 -0.1751445 0) inertia=(0.005825175 0.001215381 0.006318801 0 0 0)
        meshes=radius_rv.vtp
    Body hand_r: mass=0.4260655 mass_center=(0 -0.09895427 0) inertia=(0.001754239 0.00107575 0.002635292 0 0 0)
        meshes=(pisiform_rvs.vtp lunate_rvs.vtp scaphoid_rvs.vtp triquetrum_rvs.vtp hamate_rvs.vtp capitate_rvs.vtp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)
    Body humerus_l: mass=1.892848 mass_center=(0 -0.2748594 0) inertia=(0.03105894 0.01071437 0.03486266 0 0 0)
        meshes=humerus_lv.vtp
    Body ulna_l: mass=0.5657591 mass_center=(0 -0.1751445 0) inertia=(0.005825175 0.001215381 0.006318801 0 0 0)
        meshes=ulna_lv.vtp
    Body radius_l: mass=0.5657591 mass_center=(0 -0.1751445 0) inertia=(0.005825175 0.001215381 0.006318801 0 0 0)
        meshes=radius_lv.vtp
    Body hand_l: mass=0.4260655 mass_center=(0 -0.09895427 0) inertia=(0.001754239 0.00107575 0.002635292 0 0 0)
        meshes=(pisiform_lvs.vtp lunate_lvs.vtp scaphoid_lvs.vtp triquetrum_lvs.vtp hamate_lvs.vtp capitate_lvs.vtp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)
  JointSet:
    CustomJoint ground_pelvis: socket_parent_frame=ground_offset socket_child_frame=pelvis_offset
      Coordinate pelvis_tilt: default_value=0 range=(-1.570796 1.570796) clamped=false
      Coordinate pelvis_list: default_value=0 range=(-1.570796 1.570796) clamped=false
      Coordinate pelvis_rotation: default_value=0 range=(-1.570796 1.570796) clamped=false
      Coordinate pelvis_tx: default_value=0 range=(-5 5) clamped=false
      Coordinate pelvis_ty: default_value=0.94 range=(-1 2) clamped=false
      Coordinate pelvis_tz: default_value=0 range=(-3 3) clamped=false
      PhysicalOffsetFrame ground_offset: socket_parent=/ground translation=(0 0 0)
      PhysicalOffsetFrame pelvis_offset: socket_parent=/bodyset/pelvis translation=(0 0 0)
      SpatialTransform:
        TransformAxis rotation1: coordinates=pelvis_tilt axis=(0 0 1) LinearFunction(coefficients=1 0)
        TransformAxis rotation2: coordinates=pelvis_list axis=(1 0 0) LinearFunction(coefficients=1 0)
        TransformAxis rotation3: coordinates=pelvis_rotation axis=(0 1 0) LinearFunction(coefficients=1 0)
        TransformAxis translation1: coordinates=pelvis_tx axis=(1 0 0) LinearFunction(coefficients=1 0)
        TransformAxis translation2: coordinates=pelvis_ty axis=(0 1 0) LinearFunction(coefficients=1 0)
        TransformAxis translation3: coordinates=pelvis_tz axis=(0 0 1) LinearFunction(coefficients=1 0)
    WeldJoint sacrumjnt: socket_parent_frame=pelvis_offset socket_child_frame=sacrum_offset
      PhysicalOffsetFrame pelvis_offset: socket_parent=/bodyset/pelvis translation=(0.0100697 -0.01711848 0)
      PhysicalOffsetFrame sacrum_offset: socket_parent=/bodyset/sacrum translation=(0 0 0)
    CustomJoint hip_r: socket_parent_frame=pelvis_offset socket_child_frame=femur_r_offset
      Coordinate hip_flexion_r: default_value=1.567005e-9 range=(-0.87 2.61799) clamped=true
      Coordinate hip_adduction_r: default_value=-9.463479e-10 range=(-1.047198 0.5235988) clamped=true
      Coordinate hip_rotation_r: default_value=0 range=(-1.22173 0.6981317) clamped=true
      PhysicalOffsetFrame pelvis_offset: socket_parent=/bodyset/pelvis translation=(-0.07119275 -0.06656069 0.08408196)
      PhysicalOffsetFrame femur_r_offset: socket_parent=/bodyset/femur_r translation=(0 0 0)
      SpatialTransform: axes_held_at_zero=(translation1 translation2 translation3)
        TransformAxis rotation1: coordinates=hip_flexion_r axis=(0 0 1) LinearFunction(coefficients=1 0)
        TransformAxis rotation2: coordinates=hip_adduction_r axis=(1 0 0) LinearFunction(coefficients=1 0)
        TransformAxis rotation3: coordinates=hip_rotation_r axis=(0 1 0) LinearFunction(coefficients=1 0)
    CustomJoint walker_knee_r: socket_parent_frame=femur_r_offset socket_child_frame=tibia_r_offset
      Coordinate knee_angle_r: default_value=7.691617e-5 range=(0 2.70526) clamped=true
      PhysicalOffsetFrame femur_r_offset: socket_parent=/bodyset/femur_r
          translation=(-0.01146504 -0.5781553 -0.003897262) orientation=(-1.64157 1.44618 1.5708)
      PhysicalOffsetFrame tibia_r_offset: socket_parent=/bodyset/tibia_r
          translation=(-0.01113497 -0.01450078 -0.002043693) orientation=(-1.64157 1.44618 1.5708)
      SpatialTransform: axes_held_at_zero=translation3
        TransformAxis rotation1: coordinates=knee_angle_r axis=(1 0 0) LinearFunction(coefficients=1 0)
        TransformAxis rotation2: coordinates=knee_angle_r axis=(0 0 1)
          SimmSpline: x=(0 0.174533 0.349066 0.523599 0.698132 0.872665 1.0472 1.22173 1.39626 1.5708 1.74533 1.91986 2.0944)
              y=(0 0.0126809 0.0226969 0.0296054 0.0332049 0.0335354 0.0308779 0.0257548 0.0189295 0.011407 0.00443314 -0.00050475 -0.0016782)
        TransformAxis rotation3: coordinates=knee_angle_r axis=(0 1 0)
          SimmSpline: x=(0 0.174533 0.349066 0.523599 0.698132 0.872665 1.0472 1.22173 1.39626 1.5708 1.74533 1.91986 2.0944)
              y=(0 0.059461 0.109399 0.150618 0.18392 0.210107 0.229983 0.24435 0.254012 0.25977 0.262428 0.262788 0.261654)
        TransformAxis translation1: coordinates=knee_angle_r axis=(0 1 0)
          MultiplierFunction: scale=1.417186
            SimmSpline: x=(0 0.174533 0.349066 0.523599 0.698132 0.872665 1.0472 1.22173 1.39626 1.5708 1.74533 1.91986 2.0944)
                y=(0 0.000479 0.000835 0.001086 0.001251 0.001346 0.001391 0.001403 0.0014 0.0014 0.001421 0.001481 0.001599)
        TransformAxis translation2: coordinates=knee_angle_r axis=(0 0 1)
          MultiplierFunction: scale=1.417186
            SimmSpline: x=(0 0.174533 0.349066 0.523599 0.698132 0.872665 1.0472 1.22173 1.39626 1.5708 1.74533 1.91986 2.0944)
                y=(0 0.000988 0.001899 0.002734 0.003492 0.004173 0.004777 0.005305 0.005756 0.00613 0.006427 0.006648 0.006792)
    CustomJoint ankle_r: socket_parent_frame=tibia_r_offset socket_child_frame=talus_r_offset
      Coordinate ankle_angle_r: default_value=0 range=(-1.047198 1.047198) clamped=true
      PhysicalOffsetFrame tibia_r_offset: socket_parent=/bodyset/tibia_r translation=(0 -0.59188 0)
      PhysicalOffsetFrame talus_r_offset: socket_parent=/bodyset/talus_r translation=(0 0 0)
      SpatialTransform: axes_held_at_zero=(rotation2 rotation3 translation1 translation2 translation3)
        TransformAxis rotation1: coordinates=ankle_angle_r axis=(-0.1050135 -0.1740224 0.9791263)
            LinearFunction(coefficients=1 0)
    PinJoint subtalar_r: socket_parent_frame=talus_r_offset socket_child_frame=calcn_r_offset
      Coordinate subtalar_angle_r: default_value=0 range=(-0.3490659 0.3490659) clamped=true
      PhysicalOffsetFrame talus_r_offset: socket_parent=/bodyset/talus_r translation=(-0.04877 -0.04195 0.00792)
          orientation=(-1.76819 0.906223 1.8196)
      PhysicalOffsetFrame calcn_r_offset: socket_parent=/bodyset/calcn_r translation=(0 0 0)
          orientation=(-1.76819 0.906223 1.8196)
    PinJoint mtp_r: socket_parent_frame=calcn_r_offset socket_child_frame=toes_r_offset
      Coordinate mtp_angle_r: default_value=0 range=(-0.5235988 0.5235988) clamped=true
      PhysicalOffsetFrame calcn_r_offset: socket_parent=/bodyset/calcn_r translation=(0.1788 -0.002 0.00108)
          orientation=(-3.14159 0.619901 0)
      PhysicalOffsetFrame toes_r_offset: socket_parent=/bodyset/toes_r translation=(0 0 0)
          orientation=(-3.14159 0.619901 0)
    CustomJoint hip_l: socket_parent_frame=pelvis_offset socket_child_frame=femur_l_offset
      Coordinate hip_flexion_l: default_value=1.567005e-9 range=(-0.87 2.61799) clamped=true
      Coordinate hip_adduction_l: default_value=-9.463479e-10 range=(-1.047198 0.5235988) clamped=true
      Coordinate hip_rotation_l: default_value=0 range=(-1.22173 0.6981317) clamped=true
      PhysicalOffsetFrame pelvis_offset: socket_parent=/bodyset/pelvis
          translation=(-0.07119275 -0.06656069 -0.08408196)
      PhysicalOffsetFrame femur_l_offset: socket_parent=/bodyset/femur_l translation=(0 0 0)
      SpatialTransform: axes_held_at_zero=(translation1 translation2 translation3)
        TransformAxis rotation1: coordinates=hip_flexion_l axis=(0 0 1) LinearFunction(coefficients=1 0)
        TransformAxis rotation2: coordinates=hip_adduction_l axis=(1 0 0) LinearFunction(coefficients=-1 0)
        TransformAxis rotation3: coordinates=hip_rotation_l axis=(0 1 0) LinearFunction(coefficients=-1 0)
    CustomJoint walker_knee_l: socket_parent_frame=femur_l_offset socket_child_frame=tibia_l_offset
      Coordinate knee_angle_l: default_value=7.691617e-5 range=(0 2.70526) clamped=true
      PhysicalOffsetFrame femur_l_offset: socket_parent=/bodyset/femur_l
          translation=(-0.01146504 -0.5781553 0.003897262) orientation=(1.64157 -1.44618 1.5708)
      PhysicalOffsetFrame tibia_l_offset: socket_parent=/bodyset/tibia_l
          translation=(-0.01113497 -0.01450078 0.002043693) orientation=(1.64157 -1.44618 1.5708)
      SpatialTransform: axes_held_at_zero=translation3
        TransformAxis rotation1: coordinates=knee_angle_l axis=(-1 0 0) LinearFunction(coefficients=1 0)
        TransformAxis rotation2: coordinates=knee_angle_l axis=(0 0 1)
          SimmSpline: x=(0 0.174533 0.349066 0.523599 0.698132 0.872665 1.0472 1.22173 1.39626 1.5708 1.74533 1.91986 2.0944)
              y=(0 0.0126809 0.0226969 0.0296054 0.0332049 0.0335354 0.0308779 0.0257548 0.0189295 0.011407 0.00443314 -0.00050475 -0.0016782)
        TransformAxis rotation3: coordinates=knee_angle_l axis=(0 1 0)
          SimmSpline: x=(0 0.174533 0.349066 0.523599 0.698132 0.872665 1.0472 1.22173 1.39626 1.5708 1.74533 1.91986 2.0944)
              y=(0 -0.059461 -0.109399 -0.150618 -0.18392 -0.210107 -0.229983 -0.24435 -0.254012 -0.25977 -0.262428 -0.262788 -0.261654)
        TransformAxis translation1: coordinates=knee_angle_l axis=(0 1 0)
          MultiplierFunction: scale=1.417186
            SimmSpline: x=(0 0.174533 0.349066 0.523599 0.698132 0.872665 1.0472 1.22173 1.39626 1.5708 1.74533 1.91986 2.0944)
                y=(0 0.000479 0.000835 0.001086 0.001251 0.001346 0.001391 0.001403 0.0014 0.0014 0.001421 0.001481 0.001599)
        TransformAxis translation2: coordinates=knee_angle_l axis=(0 0 1)
          MultiplierFunction: scale=1.417186
            SimmSpline: x=(0 0.174533 0.349066 0.523599 0.698132 0.872665 1.0472 1.22173 1.39626 1.5708 1.74533 1.91986 2.0944)
                y=(0 -0.000988 -0.001899 -0.002734 -0.003492 -0.004173 -0.004777 -0.005305 -0.005756 -0.00613 -0.006427 -0.006648 -0.006792)
    CustomJoint ankle_l: socket_parent_frame=tibia_l_offset socket_child_frame=talus_l_offset
      Coordinate ankle_angle_l: default_value=0 range=(-1.047198 1.047198) clamped=true
      PhysicalOffsetFrame tibia_l_offset: socket_parent=/bodyset/tibia_l translation=(0 -0.59188 0)
      PhysicalOffsetFrame talus_l_offset: socket_parent=/bodyset/talus_l translation=(0 0 0)
      SpatialTransform: axes_held_at_zero=(rotation2 rotation3 translation1 translation2 translation3)
        TransformAxis rotation1: coordinates=ankle_angle_l axis=(0.1050135 0.1740224 0.9791263)
            LinearFunction(coefficients=1 0)
    PinJoint subtalar_l: socket_parent_frame=talus_l_offset socket_child_frame=calcn_l_offset
      Coordinate subtalar_angle_l: default_value=0 range=(-0.3490659 0.3490659) clamped=true
      PhysicalOffsetFrame talus_l_offset: socket_parent=/bodyset/talus_l translation=(-0.04877 -0.04195 -0.00792)
          orientation=(1.76819 -0.906223 1.8196)
      PhysicalOffsetFrame calcn_l_offset: socket_parent=/bodyset/calcn_l translation=(0 0 0)
          orientation=(1.76819 -0.906223 1.8196)
    PinJoint mtp_l: socket_parent_frame=calcn_l_offset socket_child_frame=toes_l_offset
      Coordinate mtp_angle_l: default_value=0 range=(-0.5235988 0.5235988) clamped=true
      PhysicalOffsetFrame calcn_l_offset: socket_parent=/bodyset/calcn_l translation=(0.1788 -0.002 -0.00108)
          orientation=(-3.14159 -0.619901 0)
      PhysicalOffsetFrame toes_l_offset: socket_parent=/bodyset/toes_l translation=(0 0 0)
          orientation=(-3.14159 -0.619901 0)
    CustomJoint back: socket_parent_frame=pelvis_offset socket_child_frame=torso_offset
      Coordinate L5_S1_Flex_Ext: default_value=0 range=(-1.570796 1.570796) clamped=true
      Coordinate L5_S1_Lat_Bending: default_value=0 range=(-1.570796 1.570796) clamped=true
      Coordinate L5_S1_axial_rotation: default_value=0 range=(-1.570796 1.570796) clamped=true
      PhysicalOffsetFrame pelvis_offset: socket_parent=/bodyset/pelvis translation=(-0.1014018 0.08206802 0)
      PhysicalOffsetFrame torso_offset: socket_parent=/bodyset/torso translation=(0 0 0)
      SpatialTransform: axes_held_at_zero=(translation1 translation2 translation3)
        TransformAxis rotation1: coordinates=L5_S1_Flex_Ext axis=(0 0 1) LinearFunction(coefficients=1 0)
        TransformAxis rotation2: coordinates=L5_S1_Lat_Bending axis=(1 0 0) LinearFunction(coefficients=1 0)
        TransformAxis rotation3: coordinates=L5_S1_axial_rotation axis=(0 1 0) LinearFunction(coefficients=1 0)
    CustomJoint head_torso: socket_parent_frame=torso_offset socket_child_frame=head_offset
      Coordinate neck_flexion: default_value=5.488091e-11 range=(-0.5 0.5) clamped=true
      Coordinate neck_bending: default_value=0 range=(-1.570796 1.570796) clamped=true
      Coordinate neck_rotation: default_value=3.658914e-10 range=(-0.785398 0.785398) clamped=true
      PhysicalOffsetFrame torso_offset: socket_parent=/bodyset/torso translation=(0 0.7895819 0)
      PhysicalOffsetFrame head_offset: socket_parent=/bodyset/head translation=(0 0.03 0)
      SpatialTransform: axes_held_at_zero=(translation1 translation2 translation3)
        TransformAxis rotation1: coordinates=neck_flexion axis=(0 0 1) LinearFunction(coefficients=1 0)
        TransformAxis rotation2: coordinates=neck_bending axis=(1 0 0) LinearFunction(coefficients=1 0)
        TransformAxis rotation3: coordinates=neck_rotation axis=(0 1 0) LinearFunction(coefficients=1 0)
    CustomJoint acromial_r: socket_parent_frame=torso_offset socket_child_frame=humerus_r_offset
      Coordinate arm_flex_r: default_value=0 range=(-1.57 1.57) clamped=false
      Coordinate arm_add_r: default_value=-1.57 range=(-2.09 1.57) clamped=false
      Coordinate arm_rot_r: default_value=0 range=(-1.57 1.57) clamped=false
      PhysicalOffsetFrame torso_offset: socket_parent=/bodyset/torso translation=(0.004600782 0.5417403 0.2479027)
      PhysicalOffsetFrame humerus_r_offset: socket_parent=/bodyset/humerus_r translation=(0 0 0)
      SpatialTransform: axes_held_at_zero=(translation1 translation2 translation3)
        TransformAxis rotation1: coordinates=arm_flex_r axis=(0 0 1) LinearFunction(coefficients=1 0)
        TransformAxis rotation2: coordinates=arm_add_r axis=(1 0 0) LinearFunction(coefficients=1 0)
        TransformAxis rotation3: coordinates=arm_rot_r axis=(0 1 0) LinearFunction(coefficients=1 0)
    PinJoint elbow_r: socket_parent_frame=humerus_r_offset socket_child_frame=ulna_r_offset
      Coordinate elbow_flex_r: default_value=7.691512e-5 range=(0 2.618) clamped=true
      PhysicalOffsetFrame humerus_r_offset: socket_parent=/bodyset/humerus_r
          translation=(0.02196175 -0.4783214 -0.01603188) orientation=(-0.0228627 0.228018 0.0051689)
      PhysicalOffsetFrame ulna_r_offset: socket_parent=/bodyset/ulna_r translation=(0 0 0)
          orientation=(-0.0228627 0.228018 0.0051689)
    PinJoint radioulnar_r: socket_parent_frame=ulna_r_offset socket_child_frame=radius_r_offset
      Coordinate pro_sup_r: default_value=1.57 range=(0 2.09) clamped=true
      PhysicalOffsetFrame ulna_r_offset: socket_parent=/bodyset/ulna_r translation=(-0.00977554 -0.01890151 0.03790329)
          orientation=(-1.56884 0.056428 1.53614)
      PhysicalOffsetFrame radius_r_offset: socket_parent=/bodyset/radius_r translation=(0 0 0)
          orientation=(-1.56884 0.056428 1.53614)
    UniversalJoint radius_hand_r: socket_parent_frame=radius_r_offset socket_child_frame=hand_r_offset
      Coordinate wrist_flex_r: default_value=0 range=(-1.92 1.92) clamped=true
      Coordinate wrist_dev_r: default_value=0 range=(-0.4363323 0.6108652) clamped=true
      PhysicalOffsetFrame radius_r_offset: socket_parent=/bodyset/radius_r
          translation=(-0.01278362 -0.3427194 0.01977778) orientation=(-1.5708 0 -1.5708)
      PhysicalOffsetFrame hand_r_offset: socket_parent=/bodyset/hand_r translation=(0 0 0)
          orientation=(-1.5708 0 -1.5708)
    CustomJoint acromial_l: socket_parent_frame=torso_offset socket_child_frame=humerus_l_offset
      Coordinate arm_flex_l: default_value=0 range=(-1.57 1.57) clamped=false
      Coordinate arm_add_l: default_value=-1.57 range=(-2.09 1.57) clamped=false
      Coordinate arm_rot_l: default_value=0 range=(-1.57 1.57) clamped=false
      PhysicalOffsetFrame torso_offset: socket_parent=/bodyset/torso translation=(0.004600782 0.5417403 -0.2479027)
      PhysicalOffsetFrame humerus_l_offset: socket_parent=/bodyset/humerus_l translation=(0 0 0)
      SpatialTransform: axes_held_at_zero=(translation1 translation2 translation3)
        TransformAxis rotation1: coordinates=arm_flex_l axis=(0 0 1) LinearFunction(coefficients=1 0)
        TransformAxis rotation2: coordinates=arm_add_l axis=(-1 0 0) LinearFunction(coefficients=1 0)
        TransformAxis rotation3: coordinates=arm_rot_l axis=(0 -1 0) LinearFunction(coefficients=1 0)
    PinJoint elbow_l: socket_parent_frame=humerus_l_offset socket_child_frame=ulna_l_offset
      Coordinate elbow_flex_l: default_value=7.691512e-5 range=(0 2.618) clamped=true
      PhysicalOffsetFrame humerus_l_offset: socket_parent=/bodyset/humerus_l
          translation=(0.02196175 -0.4783214 0.01603188) orientation=(0.0228627 -0.228018 0.0051689)
      PhysicalOffsetFrame ulna_l_offset: socket_parent=/bodyset/ulna_l translation=(0 0 0)
          orientation=(0.0228627 -0.228018 0.0051689)
    PinJoint radioulnar_l: socket_parent_frame=ulna_l_offset socket_child_frame=radius_l_offset
      Coordinate pro_sup_l: default_value=1.57 range=(0 2.09) clamped=true
      PhysicalOffsetFrame ulna_l_offset: socket_parent=/bodyset/ulna_l
          translation=(-0.00977554 -0.01890151 -0.03790329) orientation=(1.56884 -0.056428 1.53614)
      PhysicalOffsetFrame radius_l_offset: socket_parent=/bodyset/radius_l translation=(0 0 0)
          orientation=(1.56884 -0.056428 1.53614)
    UniversalJoint radius_hand_l: socket_parent_frame=radius_l_offset socket_child_frame=hand_l_offset
      Coordinate wrist_flex_l: default_value=0 range=(-1.92 1.92) clamped=true
      Coordinate wrist_dev_l: default_value=0 range=(-0.4363323 0.6108652) clamped=true
      PhysicalOffsetFrame radius_l_offset: socket_parent=/bodyset/radius_l
          translation=(-0.01278362 -0.3427194 -0.01977778) orientation=(1.5708 0 1.5708)
      PhysicalOffsetFrame hand_l_offset: socket_parent=/bodyset/hand_l translation=(0 0 0)
          orientation=(1.5708 0 1.5708)
  MarkerSet:
    Marker Nose: head (0.116266 0.0126096 0.000152885) fixed=true
    Marker Neck: torso (-0.01859503 0.5341676 -0.0007422498) fixed=true
    Marker LShoulder: torso (-0.01859506 0.5341677 -0.2939458) fixed=true
    Marker RShoulder: torso (-0.01859506 0.5341677 0.2939458) fixed=true
    Marker LElbow: humerus_l (0.04177144 -0.4978396 0.01459937) fixed=true
    Marker RElbow: humerus_r (0.04177144 -0.4978396 -0.01459937) fixed=true
    Marker LWrist: radius_l (-0.0002522561 -0.3416367 -0.01415949) fixed=true
    Marker RWrist: radius_r (-0.0002522561 -0.3416367 0.01415949) fixed=true
    Marker LHip: pelvis (-0.06437299 -0.08191004 -0.106141) fixed=true
    Marker RHip: pelvis (-0.06437299 -0.08191004 0.106141) fixed=true
    Marker LKnee: femur_l (-0.007667665 -0.5472212 -0.00724281) fixed=true
    Marker RKnee: femur_r (-0.007667665 -0.5472212 0.00724281) fixed=true
    Marker LAnkle: tibia_l (-0.0003940954 -0.5616665 -0.0205913) fixed=true
    Marker RAnkle: tibia_r (-0.0003940954 -0.5616665 0.0205913) fixed=true
    Marker LEye: head (0.0781497 0.0467611 -0.0311069) fixed=true
    Marker REye: head (0.0781497 0.0467611 0.0311069) fixed=true
    Marker LThumb: hand_l (0.0159006 -0.05353005 -0.0452196) fixed=true
    Marker LIndex: hand_l (0.003118293 -0.08261089 -0.01602926) fixed=true
    Marker LPinky: hand_l (0.003113118 -0.07381032 0.0325446) fixed=true
    Marker RThumb: hand_r (0.0159006 -0.0535301 0.0452196) fixed=true
    Marker RIndex: hand_r (0.00311829 -0.0826109 0.0160293) fixed=true
    Marker RPinky: hand_r (0.00311312 -0.0738103 -0.0325446) fixed=true
  ContactGeometrySet:
    ContactHalfSpace floor: socket_frame=/ground location=(0 0 0) orientation=(0 0 -1.570796)
    ContactSphere s1_r: socket_frame=/bodyset/calcn_r location=(0.002080214 -0.01 -0.004186676) radius=0.032
    ContactSphere s2_r: socket_frame=/bodyset/calcn_r location=(0.1623619 -0.01 -0.03141774) radius=0.032
    ContactSphere s3_r: socket_frame=/bodyset/calcn_r location=(0.1455276 -0.01 0.0564995) radius=0.032
    ContactSphere s4_r: socket_frame=/bodyset/calcn_r location=(0.07247284 -0.01 0.02884721) radius=0.032
    ContactSphere s5_r: socket_frame=/bodyset/toes_r location=(0.06565097 -0.01 -0.02052721) radius=0.032
    ContactSphere s6_r: socket_frame=/bodyset/toes_r location=(0.04923823 -0.01 0.06768282) radius=0.032
    ContactSphere s1_l: socket_frame=/bodyset/calcn_l location=(0.002080214 -0.01 0.004186676) radius=0.032
    ContactSphere s2_l: socket_frame=/bodyset/calcn_l location=(0.1623619 -0.01 0.03141774) radius=0.032
    ContactSphere s3_l: socket_frame=/bodyset/calcn_l location=(0.1455276 -0.01 -0.0564995) radius=0.032
    ContactSphere s4_l: socket_frame=/bodyset/calcn_l location=(0.07247284 -0.01 -0.02884721) radius=0.032
    ContactSphere s5_l: socket_frame=/bodyset/toes_l location=(0.06565097 -0.01 0.02052721) radius=0.032
    ContactSphere s6_l: socket_frame=/bodyset/toes_l location=(0.04923823 -0.01 -0.06768282) radius=0.032
