# OpenSim document version 40000
InverseKinematicsTool:
  results_directory: ./
  model_file: /Users/laomeng/Desktop/MVE386 Project Course/PoseEst1/monocular_baseline/results_mono/kinematics/markers_results_mono_22markers.osim
  constraint_weight: Inf
  accuracy: 1e-5
  time_range: 0 241.12
  output_motion_file: /Users/laomeng/Desktop/MVE386 Project Course/PoseEst1/monocular_baseline/results_mono/kinematics/markers_results_mono.mot
  report_errors: true
  marker_file: /Users/laomeng/Desktop/MVE386 Project Course/PoseEst1/monocular_baseline/results_mono/markers_results_mono.trc
  report_marker_locations: false
  IKTaskSet:
    IKMarkerTask Nose: apply=true weight=0.1
    IKMarkerTask Neck: apply=true weight=0.2
    IKMarkerTask LShoulder: apply=true weight=2
    IKMarkerTask RShoulder: apply=true weight=2
    IKMarkerTask LElbow: apply=true weight=1
    IKMarkerTask RElbow: apply=true weight=1
    IKMarkerTask LWrist: apply=true weight=1
    IKMarkerTask RWrist: apply=true weight=1
    IKMarkerTask LHip: apply=true weight=2
    IKMarkerTask RHip: apply=true weight=2
    IKMarkerTask LKnee: apply=true weight=1
    IKMarkerTask RKnee: apply=true weight=1
    IKMarkerTask LAnkle: apply=true weight=1
    IKMarkerTask RAnkle: apply=true weight=1
    IKMarkerTask LEye: apply=true weight=0.05
    IKMarkerTask REye: apply=true weight=0.05
    IKMarkerTask LThumb: apply=true weight=0.2
    IKMarkerTask LIndex: apply=true weight=0.2
    IKMarkerTask LPinky: apply=true weight=0.2
    IKMarkerTask RThumb: apply=true weight=0.2
    IKMarkerTask RIndex: apply=true weight=0.2
    IKMarkerTask RPinky: apply=true weight=0.2
    IKCoordinateTask [values shared by the 5 below unless stated]: apply=true value_type=default_value value=0
    IKCoordinateTask L5_S1_Flex_Ext: weight=0.1
    IKCoordinateTask pelvis_tilt: weight=0.05
    IKCoordinateTask pelvis_list: weight=0.005
    IKCoordinateTask hip_adduction_r: weight=0.005
    IKCoordinateTask hip_adduction_l: weight=0.005
