# OpenSim document version 40000
ScaleTool Pose2Sim_scaled:
  mass: 70 [kg]
  height: 1.695
  age: -1
  GenericModelMaker:
    model_file: /Users/laomeng/Desktop/MVE386 Project Course/PoseEst1/monocular_baseline/results_mono/kinematics/markers_results_mono.osim
  ModelScaler:
    apply: true
    scaling_order: manualScale measurements
    time_range: 0.0166667 2.5
    preserve_mass_distribution: true
    output_model_file: /Users/laomeng/Desktop/MVE386 Project Course/PoseEst1/monocular_baseline/results_mono/kinematics/markers_results_mono.osim
    MeasurementSet:
      Measurement torso: apply=false
        MarkerPair: markers=(LShoulder LHip)
        MarkerPair: markers=(RShoulder RHip)
        BodyScale lumbar5: axes=(X Y Z)
        BodyScale lumbar4: axes=(X Y Z)
        BodyScale lumbar3: axes=(X Y Z)
        BodyScale lumbar2: axes=(X Y Z)
        BodyScale lumbar1: axes=(X Y Z)
        BodyScale torso: axes=(X Y Z)
      Measurement arm: apply=false
        MarkerPair: markers=(LShoulder LElbow)
        MarkerPair: markers=(RShoulder RElbow)
        BodyScale humerus_r: axes=(X Y Z)
        BodyScale humerus_l: axes=(X Y Z)
      Measurement forearm: apply=false
        MarkerPair: markers=(LElbow LWrist)
        MarkerPair: markers=(RElbow RWrist)
        BodyScale ulna_r: axes=(X Y Z)
        BodyScale radius_r: axes=(X Y Z)
        BodyScale hand_r: axes=(X Y Z)
        BodyScale ulna_l: axes=(X Y Z)
        BodyScale radius_l: axes=(X Y Z)
        BodyScale hand_l: axes=(X Y Z)
      Measurement thigh: apply=false
        MarkerPair: markers=(LHip LKnee)
        MarkerPair: markers=(RHip RKnee)
        BodyScale femur_r: axes=(X Y Z)
        BodyScale patella_r: axes=(X Y Z)
        BodyScale femur_l: axes=(X Y Z)
        BodyScale patella_l: axes=(X Y Z)
      Measurement shank: apply=false
        MarkerPair: markers=(LKnee LAnkle)
        MarkerPair: markers=(RKnee RAnkle)
        BodyScale tibia_r: axes=(X Y Z)
        BodyScale tibia_l: axes=(X Y Z)
      Measurement head: apply=false
        MarkerPair: markers=(LShoulder Nose)
        MarkerPair: markers=(RShoulder Nose)
      Measurement pelvis: apply=false
        MarkerPair: markers=(RHip LHip)
        BodyScale pelvis: axes=(X Y Z)
        BodyScale sacrum: axes=(X Y Z)
    ScaleSet:
      Scale: scales=(1.670858 1.670858 1.670858) segment=humerus_r apply=true
      Scale: scales=(1.45318 1.45318 1.45318) segment=radius_r apply=true
      Scale: scales=(1.00697 1.00697 1.00697) segment=pelvis apply=true
      Scale: scales=(1.45318 1.45318 1.45318) segment=radius_l apply=true
      Scale: scales=(1.00697 1.00697 1.00697) segment=sacrum apply=true
      Scale: scales=(1.417186 1.417186 1.417186) segment=femur_r apply=true
      Scale: scales=(1.417186 1.417186 1.417186) segment=femur_l apply=true
      Scale: scales=(1.458251 1.458251 1.458251) segment=torso apply=true
      Scale: scales=(1.458251 1.458251 1.458251) segment=lumbar3 apply=true
      Scale: scales=(1.417186 1.417186 1.417186) segment=patella_r apply=true
      Scale: scales=(1.458251 1.458251 1.458251) segment=lumbar2 apply=true
      Scale: scales=(1.45318 1.45318 1.45318) segment=hand_l apply=true
      Scale: scales=(1.458251 1.458251 1.458251) segment=lumbar4 apply=true
      Scale: scales=(1.45318 1.45318 1.45318) segment=ulna_l apply=true
      Scale: scales=(1.670858 1.670858 1.670858) segment=humerus_l apply=true
      Scale: scales=(1.458251 1.458251 1.458251) segment=lumbar5 apply=true
      Scale: scales=(1.458251 1.458251 1.458251) segment=lumbar1 apply=true
      Scale: scales=(1.376465 1.376465 1.376465) segment=tibia_l apply=true
      Scale: scales=(1.417186 1.417186 1.417186) segment=patella_l apply=true
      Scale: scales=(1.45318 1.45318 1.45318) segment=hand_r apply=true
      Scale: scales=(1.376465 1.376465 1.376465) segment=tibia_r apply=true
      Scale: scales=(1.45318 1.45318 1.45318) segment=ulna_r apply=true
  MarkerPlacer:
    apply: false
    time_range: 0.0166667 0.416667
    output_model_file: ../S00_Demo_Session/S00_P00_SingleParticipant/S00_P00_OpenSim/Model_Pose2Sim_S00_P00_Coco_scaled.osim
    max_marker_movement: -1
    IKTaskSet:
      IKMarkerTask Nose: apply=true weight=0.1
      IKMarkerTask Neck: apply=true weight=1
      IKMarkerTask LShoulder: apply=true weight=2
      IKMarkerTask RShoulder: apply=true weight=2
      IKMarkerTask LElbow: apply=true weight=1
      IKMarkerTask RElbow: apply=true weight=1
      IKMarkerTask LWrist: apply=true weight=1
      IKMarkerTask RWrist: apply=true weight=1
      IKMarkerTask LHip: apply=true weight=2
      IKMarkerTask RHip: apply=true weight=2
      IKMarkerTask LKnee: apply=true weight=1
      IKMarkerTask RKnee: apply=true weight=1
      IKMarkerTask LAnkle: apply=true weight=1
      IKMarkerTask RAnkle: apply=true weight=1
      IKCoordinateTask pelvis_tilt: apply=true weight=0 value_type=default_value value=0
      IKCoordinateTask pelvis_list: apply=true weight=0.1 value_type=default_value value=0
      IKCoordinateTask ankle_angle_r: apply=true weight=0 value_type=manual_value value=0
      IKCoordinateTask ankle_angle_l: apply=true weight=0 value_type=manual_value value=0
      IKCoordinateTask L5_S1_Flex_Ext: apply=true weight=0.1 value_type=default_value value=0
